pLerp(t, p0, pM) := p0*(1 - t) + pM*t
sqrLerp(t, p0, pM) := p0*(1 - sqrt(t)) + pM*sqrt(t)  # basic lerp formulas
ro(h) := Adens0 - h/Ha*Adens0  # density sampler
vpoint(s) := pLerp(s, Pv, Pve)
# Light end point lerped between two light endpoints at view start and end
Lendp(s) := pLerp(s, endpPv, endpPve)
scanLightPt(t, s) := pLerp(t, vpoint(s), Lendp(s))  # final sampling point in atmosphere.
RayAtmLen(s) := pLerp(s, endlPv, endlPve)  # lerped length of atmosphere ray
H(s) := pLerp(s, 0, Ha) → Ha*s
# interpolated point of ray atmospheric exit
Hr(t, s) := pLerp(t, H(s), Ha) → Ha*s*(-t + 1) + Ha*t
# distance to exit for light at t-point
# Length to current view t-point on view ray
curVLen(p) := pLerp(p, 0, LmaxV)
# Sum density over line, defined by heights
# Remaining power after travelling some distance at heights | sk is 0..1 where 0.9 means 10% of light gets scattered
RemPower(Hs, He, Len, Pow0) := Pow0*ProdDensAvgP(Hs, He, Len)
# remaining direct ray power, after travelling Len from Hs to He.
vpHitPow(pv) := RemPower(H(pv), Ha, RayAtmLen(pv), LPower)  # Total Ray power that hits point on view line
# hf0- height at which it is 0, hfmax - height at which it is 1.
foc(hf) := (hf + hf0)/hfmax
# Ray power that is reflected towards eye as scattered light. focusP is percent of sk
remTop := LPower*(1 + sk*(prk - 1))^(endlPve*roTop)
remBot := LPower*(1 + sk*(prk - 1))^(endlPv*roBot)
lerpHitPow(pv) := sqrLerp(pv, remBot, remTop)
reflectedBack(pr) := lerpHitPow(pr)*focusP*sk*ro(H(pr))*ppxi
# power that reaches eye form view t-point thourgh atmos.
remToEye(TEpow, TElen, pr) := TEpow*(1 + sk*(prk - 1))^(TElen*roEye)
indirectEye(pn) := remToEye(reflectedBack(pn), curVLen(pn), pn)
TotalToEye := integral(reflectedBack(pp)*LmaxV, pp = 0 .. 1) → Adens0*LPower*LmaxV*focusP*ppxi*sk*(8*((prk - 1)*sk + 1)^(endlPve*roTop) + 7*((prk - 1)*sk + 1)^(endlPv*roBot))/30
FadedToEye := TotalToEye*(1 + sk*(prk - 1))^(LmaxV/2*roEyeAvg)
integral(indirectEye(pp)*LmaxV, pp = 0 .. 1)
1/Lmax*integral(ro(H(s/Lmax)), s = 0 .. Lmax) → Adens0/2
sk := 0.3*m^3/(kg*km) = 0.0003 m^2/kg
kg/m^3*km
powM2 := lx  # how much light hits one m^2
rho := kg/m^3
skunit := 1/kg
# skm is how much light is scattered by 1m*1m*1km * rho
sk := 3
mass1 := rhoAV*kg/m^3*dist*1000*m^3
sk^(mass1*skunit) → 3^(1000*dist*rhoAV)
vol := rhoAvg*(kg/m^3)*dist*1000 m
2*x == b solve, x → b/2
x^pow == KMsk solve, x → e^(ln(KMsk)/pow)
powM2*sk^vol → lx*3^(1000*dist*kg*rhoAvg/m^2)
e^(ln(0.05)/1000) = 0.997009
x^-1000 → 1/x^1000
